// SBML level 3 version 2

model biocrnpyler_261814()
  // model units - substance: mole, time: second, volume: litre, area: square_metre, length: metre, extent: mole

  // Compartments:
  compartment default = 1e-6;

  // Species:
  species dna_part_prom_forward_part_rbs_forward_part_YFP_forward_part_t_forward_ in default = 0;
  species rna_part_rbs_forward_part_YFP_forward_part_t_forward_ in default = 0;
  species protein_YFP_degtagged in default = 0;

  // Parameters:
  ktx__ = 0.05;
  ktl__ = 0.04017527;
  kdil__ = 0.003893346;

  // Reactions:
  r0: dna_part_prom_forward_part_rbs_forward_part_YFP_forward_part_t_forward_ => dna_part_prom_forward_part_rbs_forward_part_YFP_forward_part_t_forward_ + rna_part_rbs_forward_part_YFP_forward_part_t_forward_; ktx__*dna_part_prom_forward_part_rbs_forward_part_YFP_forward_part_t_forward_;
  r1: rna_part_rbs_forward_part_YFP_forward_part_t_forward_ => rna_part_rbs_forward_part_YFP_forward_part_t_forward_ + protein_YFP_degtagged; ktl__*rna_part_rbs_forward_part_YFP_forward_part_t_forward_;
  r2: protein_YFP_degtagged => ; kdil__*protein_YFP_degtagged;
  r3: rna_part_rbs_forward_part_YFP_forward_part_t_forward_ => ; kdil__*rna_part_rbs_forward_part_YFP_forward_part_t_forward_;

  // Unit definitions:
  unit square_metre = metre^2;
end
